# OpenSim document version 40000
Model full_body_spec_anthro_driver:
  gravity: 0 0 -9.80665
  length_units: m
  force_units: N
  Ground
  BodySet:
    Body Hip: mass=8.7126 mass_center=(0 0 0.0536839) inertia=(0.05050763 0.06292222 0.05732314 0 0 0)
    Body Torso: mass=0.3 mass_center=(0 0 0) inertia=(0.0001 0.0001 0.0001 0 0 0)
    Body Spine: mass=25.1862 mass_center=(0 0 0.2147273) inertia=(0.3906333 0.524171 0.2447507 0 0 0)
    Body Head: mass=5.4132 mass_center=(0 0 0.1192398) inertia=(0.03057207 0.02828714 0.02098866 0 0 0)
    Body LScap: mass=0.42276 mass_center=(0 0.1125194 0) inertia=(0.00116252 0.0004010606 0.001304925 0 0 0)
    Body LS: mass=2.1138 mass_center=(0 0 -0.1756723) inertia=(0.01416845 0.01590404 0.004888007 0 0 0)
    Body LE: mass=0.6318 mass_center=(0 0 -0.06644266) inertia=(0.0009362095 0.001015546 0.0001951875 0 0 0)
    Body LF: mass=0.6318 mass_center=(0 0 -0.06644266) inertia=(0.0009362095 0.001015546 0.0001951875 0 0 0)
    Body Clubhead: mass=1.421272 mass_center=(-8.799908e-5 -0.9034062 0.0635946)
        inertia=(0.220651 0.001542535 0.2207367 -2.758979e-5 -3.106385e-7 -0.0001061817)
        meshes=(club/club_driver_shaft.stl club/club_driver_grip.stl club/club_driver_head.stl)
    Body RScap: mass=0.42276 mass_center=(0 -0.1125194 0) inertia=(0.00116252 0.0004010606 0.001304925 0 0 0)
    Body RS: mass=2.1138 mass_center=(0 0 -0.1756723) inertia=(0.01416845 0.01590404 0.004888007 0 0 0)
    Body RE: mass=0.6318 mass_center=(0 0 -0.06644266) inertia=(0.0009362095 0.001015546 0.0001951875 0 0 0)
    Body RF: mass=0.6318 mass_center=(0 0 -0.06644266) inertia=(0.0009362095 0.001015546 0.0001951875 0 0 0)
    Body Grip: mass=0.01 mass_center=(0 0 0) inertia=(9.408583e-7 9.408583e-7 8.0645e-7 0 0 0)
    Body femur_r: mass=9.800404 mass_center=(0 -0.168783 0) inertia=(0.13907 0.0364552 0.146652 0 0 0)
    Body tibia_r: mass=3.906401 mass_center=(0 -0.204691 0) inertia=(0.0634325 0.0056617 0.0634325 0 0 0)
    Body talus_r: mass=0.1053648 mass_center=(0 0 0) inertia=(0.00108152 0.000973557 0.000973557 0 0 0)
    Body calcn_r: mass=1.31706 mass_center=(0.0906376 0.03 0) inertia=(0.00151413 0.00352695 0.00352695 0 0 0)
    Body toes_r: mass=0.2282202 mass_center=(0.0313606 0.006 -0.017963)
        inertia=(0.000108152 0.000183915 0.000183915 0 0 0)
    Body femur_l: mass=9.800404 mass_center=(0 -0.16385 0) inertia=(0.13106 0.0343555 0.138205 0 0 0)
    Body tibia_l: mass=3.906401 mass_center=(0 -0.202735 0) inertia=(0.0622653 0.00563255 0.0622653 0 0 0)
    Body talus_l: mass=0.1053648 mass_center=(0 0 0) inertia=(0.00107874 0.000962282 0.000962282 0 0 0)
    Body calcn_l: mass=1.31706 mass_center=(0.0895969 0.03 0) inertia=(0.00151023 0.00346176 0.00346176 0 0 0)
    Body toes_l: mass=0.2282202 mass_center=(0.0310005 0.006 0.0179167)
        inertia=(0.000107874 0.000180811 0.000180811 0 0 0)
  JointSet:
    CustomJoint joint_Hip: socket_parent_frame=joint_Hip_parent_offset socket_child_frame=joint_Hip_child_offset
      Coordinate TranslationInputX: default_value=0 range=(-10 10) clamped=false
      Coordinate TranslationInputY: default_value=0 range=(-10 10) clamped=false
      Coordinate TranslationInputZ: default_value=0 range=(-10 10) clamped=false
      Coordinate HipInputX: default_value=0 range=(-3.141593 3.141593) clamped=false
      Coordinate HipInputY: default_value=0 range=(-3.141593 3.141593) clamped=false
      Coordinate HipInputZ: default_value=0 range=(-3.141593 3.141593) clamped=false
      PhysicalOffsetFrame joint_Hip_parent_offset: socket_parent=/ground translation=(0 0 0)
      PhysicalOffsetFrame joint_Hip_child_offset: socket_parent=/bodyset/Hip translation=(0 0 0)
      SpatialTransform:
        TransformAxis rotation1: coordinates=HipInputX axis=(1 0 0) LinearFunction(coefficients=1 0)
        TransformAxis rotation2: coordinates=HipInputY axis=(0 1 0) LinearFunction(coefficients=1 0)
        TransformAxis rotation3: coordinates=HipInputZ axis=(0 0 1) LinearFunction(coefficients=1 0)
        TransformAxis translation1: coordinates=TranslationInputX axis=(1 0 0) LinearFunction(coefficients=1 0)
        TransformAxis translation2: coordinates=TranslationInputY axis=(0 1 0) LinearFunction(coefficients=1 0)
        TransformAxis translation3: coordinates=TranslationInputZ axis=(0 0 1) LinearFunction(coefficients=1 0)
    CustomJoint joint_Spine: socket_parent_frame=joint_Spine_parent_offset socket_child_frame=joint_Spine_child_offset
      Coordinate SpineInputX: default_value=0 range=(-0.6108652 0.6108652) clamped=false
      Coordinate SpineInputY: default_value=0 range=(-0.7853982 0.7853982) clamped=false
      PhysicalOffsetFrame joint_Spine_parent_offset: socket_parent=/bodyset/Torso translation=(0 0 0)
      PhysicalOffsetFrame joint_Spine_child_offset: socket_parent=/bodyset/Spine translation=(0 0 0)
      SpatialTransform: axes_held_at_zero=(rotation3 translation1 translation2 translation3)
        TransformAxis rotation1: coordinates=SpineInputX axis=(1 0 0) LinearFunction(coefficients=1 0)
        TransformAxis rotation2: coordinates=SpineInputY axis=(0 1 0) LinearFunction(coefficients=1 0)
    CustomJoint joint_Torso: socket_parent_frame=joint_Torso_parent_offset socket_child_frame=joint_Torso_child_offset
      Coordinate TorsoInput: default_value=0 range=(-1.745329 1.745329) clamped=false
      PhysicalOffsetFrame joint_Torso_parent_offset: socket_parent=/bodyset/Hip translation=(0 0 0.1381825)
      PhysicalOffsetFrame joint_Torso_child_offset: socket_parent=/bodyset/Torso translation=(0 0 0)
      SpatialTransform: axes_held_at_zero=(rotation1 rotation2 translation1 translation2 translation3)
        TransformAxis rotation3: coordinates=TorsoInput axis=(0 0 1) LinearFunction(coefficients=1 0)
    CustomJoint joint_LE: socket_parent_frame=joint_LE_parent_offset socket_child_frame=joint_LE_child_offset
      Coordinate LEInput: default_value=0 range=(-2.617994 0.08726646) clamped=false
      PhysicalOffsetFrame joint_LE_parent_offset: socket_parent=/bodyset/LS translation=(0 0 -0.3043525)
      PhysicalOffsetFrame joint_LE_child_offset: socket_parent=/bodyset/LE translation=(0 0 0)
      SpatialTransform: axes_held_at_zero=(rotation1 rotation3 translation1 translation2 translation3)
        TransformAxis rotation2: coordinates=LEInput axis=(0 1 0) LinearFunction(coefficients=1 0)
    CustomJoint joint_LF: socket_parent_frame=joint_LF_parent_offset socket_child_frame=joint_LF_child_offset
      Coordinate LFInput: default_value=0 range=(-1.570796 1.570796) clamped=false
      PhysicalOffsetFrame joint_LF_parent_offset: socket_parent=/bodyset/LE translation=(0 0 -0.1452616)
      PhysicalOffsetFrame joint_LF_child_offset: socket_parent=/bodyset/LF translation=(0 0 0)
      SpatialTransform: axes_held_at_zero=(rotation1 rotation2 translation1 translation2 translation3)
        TransformAxis rotation3: coordinates=LFInput axis=(0 0 1) LinearFunction(coefficients=1 0)
    CustomJoint joint_LScap: socket_parent_frame=joint_LScap_parent_offset socket_child_frame=joint_LScap_child_offset
      Coordinate LScapInputX: default_value=0 range=(-0.1745329 0.5235988) clamped=false
      Coordinate LScapInputY: default_value=0 range=(-0.6981317 0.6981317) clamped=false
      PhysicalOffsetFrame joint_LScap_parent_offset: socket_parent=/bodyset/Spine translation=(0 0 0.4226109)
      PhysicalOffsetFrame joint_LScap_child_offset: socket_parent=/bodyset/LScap translation=(0 0 0)
      SpatialTransform: axes_held_at_zero=(rotation2 translation1 translation2 translation3)
        TransformAxis rotation1: coordinates=LScapInputX axis=(1 0 0) LinearFunction(coefficients=1 0)
        TransformAxis rotation3: coordinates=LScapInputY axis=(0 0 1) LinearFunction(coefficients=1 0)
    CustomJoint joint_LS: socket_parent_frame=joint_LS_parent_offset socket_child_frame=joint_LS_child_offset
      Coordinate LSInputX: default_value=0 range=(-3.141593 3.141593) clamped=false
      Coordinate LSInputY: default_value=0 range=(-3.141593 3.141593) clamped=false
      Coordinate LSInputZ: default_value=0 range=(-3.141593 3.141593) clamped=false
      PhysicalOffsetFrame joint_LS_parent_offset: socket_parent=/bodyset/LScap translation=(0 0.19494 0)
          orientation=(0 -1.570796 0)
      PhysicalOffsetFrame joint_LS_child_offset: socket_parent=/bodyset/LS translation=(0 0 0)
      SpatialTransform: axes_held_at_zero=(translation1 translation2 translation3)
        TransformAxis rotation1: coordinates=LSInputX axis=(1 0 0) LinearFunction(coefficients=1 0)
        TransformAxis rotation2: coordinates=LSInputY axis=(0 1 0) LinearFunction(coefficients=1 0)
        TransformAxis rotation3: coordinates=LSInputZ axis=(0 0 1) LinearFunction(coefficients=1 0)
    CustomJoint joint_Clubhead: socket_parent_frame=joint_Clubhead_parent_offset
        socket_child_frame=joint_Clubhead_child_offset
      Coordinate LWInputX: default_value=0 range=(-0.6981317 0.4363323) clamped=false
      Coordinate LWInputY: default_value=0 range=(-1.22173 1.22173) clamped=false
      PhysicalOffsetFrame joint_Clubhead_parent_offset: socket_parent=/bodyset/LF translation=(0 0 -0.1452616)
          orientation=(-1.570796 1.570796 0)
      PhysicalOffsetFrame joint_Clubhead_child_offset: socket_parent=/bodyset/Clubhead
          translation=(-0.02501412 -1.124 0.05908934) orientation=(-1.28206 0.6449591 1.111878)
      SpatialTransform: axes_held_at_zero=(rotation2 translation1 translation2 translation3)
        TransformAxis rotation1: coordinates=LWInputX axis=(1 0 0) LinearFunction(coefficients=1 0)
        TransformAxis rotation3: coordinates=LWInputY axis=(0 0 1) LinearFunction(coefficients=1 0)
    CustomJoint joint_RE: socket_parent_frame=joint_RE_parent_offset socket_child_frame=joint_RE_child_offset
      Coordinate REInput: default_value=0 range=(-2.617994 0.08726646) clamped=false
      PhysicalOffsetFrame joint_RE_parent_offset: socket_parent=/bodyset/RS translation=(0 0 -0.3043525)
      PhysicalOffsetFrame joint_RE_child_offset: socket_parent=/bodyset/RE translation=(0 0 0)
      SpatialTransform: axes_held_at_zero=(rotation1 rotation3 translation1 translation2 translation3)
        TransformAxis rotation2: coordinates=REInput axis=(0 1 0) LinearFunction(coefficients=1 0)
    CustomJoint joint_RF: socket_parent_frame=joint_RF_parent_offset socket_child_frame=joint_RF_child_offset
      Coordinate RFInput: default_value=0 range=(-1.570796 1.570796) clamped=false
      PhysicalOffsetFrame joint_RF_parent_offset: socket_parent=/bodyset/RE translation=(0 0 -0.1452616)
          orientation=(3.141593 0 0)
      PhysicalOffsetFrame joint_RF_child_offset: socket_parent=/bodyset/RF translation=(0 0 0)
          orientation=(3.141593 0 0)
      SpatialTransform: axes_held_at_zero=(rotation1 rotation2 translation1 translation2 translation3)
        TransformAxis rotation3: coordinates=RFInput axis=(0 0 1) LinearFunction(coefficients=1 0)
    CustomJoint joint_RScap: socket_parent_frame=joint_RScap_parent_offset socket_child_frame=joint_RScap_child_offset
      Coordinate RScapInputX: default_value=0 range=(-0.1745329 0.5235988) clamped=false
      Coordinate RScapInputY: default_value=0 range=(-0.6981317 0.6981317) clamped=false
      PhysicalOffsetFrame joint_RScap_parent_offset: socket_parent=/bodyset/Spine translation=(0 0 0.4226109)
          orientation=(-3.141593 0 3.141593)
      PhysicalOffsetFrame joint_RScap_child_offset: socket_parent=/bodyset/RScap translation=(0 0 0)
          orientation=(-3.141593 0 3.141593)
      SpatialTransform: axes_held_at_zero=(rotation2 translation1 translation2 translation3)
        TransformAxis rotation1: coordinates=RScapInputX axis=(1 0 0) LinearFunction(coefficients=1 0)
        TransformAxis rotation3: coordinates=RScapInputY axis=(0 0 1) LinearFunction(coefficients=1 0)
    CustomJoint joint_RS: socket_parent_frame=joint_RS_parent_offset socket_child_frame=joint_RS_child_offset
      Coordinate RSInputX: default_value=0 range=(-3.141593 3.141593) clamped=false
      Coordinate RSInputY: default_value=0 range=(-3.141593 3.141593) clamped=false
      Coordinate RSInputZ: default_value=0 range=(-3.141593 3.141593) clamped=false
      PhysicalOffsetFrame joint_RS_parent_offset: socket_parent=/bodyset/RScap translation=(0 -0.19494 0)
          orientation=(0 1.570796 0)
      PhysicalOffsetFrame joint_RS_child_offset: socket_parent=/bodyset/RS translation=(0 0 0)
          orientation=(-3.141593 0 3.141593)
      SpatialTransform: axes_held_at_zero=(translation1 translation2 translation3)
        TransformAxis rotation1: coordinates=RSInputX axis=(1 0 0) LinearFunction(coefficients=1 0)
        TransformAxis rotation2: coordinates=RSInputY axis=(0 1 0) LinearFunction(coefficients=1 0)
        TransformAxis rotation3: coordinates=RSInputZ axis=(0 0 1) LinearFunction(coefficients=1 0)
    CustomJoint joint_Grip: socket_parent_frame=joint_Grip_parent_offset socket_child_frame=joint_Grip_child_offset
      Coordinate RWInputX: default_value=0 range=(-0.6981317 0.4363323) clamped=false
      Coordinate RWInputY: default_value=0 range=(-1.22173 1.22173) clamped=false
      PhysicalOffsetFrame joint_Grip_parent_offset: socket_parent=/bodyset/RF translation=(0 0 -0.1452616)
          orientation=(1.570796 -1.570796 0)
      PhysicalOffsetFrame joint_Grip_child_offset: socket_parent=/bodyset/Grip translation=(0 0 0.0127)
          orientation=(-0.1873064 -0.8726641 1.570796)
      SpatialTransform: axes_held_at_zero=(rotation2 translation1 translation2 translation3)
        TransformAxis rotation1: coordinates=RWInputX axis=(1 0 0) LinearFunction(coefficients=1 0)
        TransformAxis rotation3: coordinates=RWInputY axis=(0 0 1) LinearFunction(coefficients=1 0)
    CustomJoint joint_Head: socket_parent_frame=joint_Head_parent_offset socket_child_frame=joint_Head_child_offset
      Coordinate NeckInputX: default_value=0 range=(-0.7853982 0.7853982) clamped=false
      Coordinate NeckInputY: default_value=0 range=(-1.047198 1.047198) clamped=false
      Coordinate NeckInputZ: default_value=0 range=(-1.396263 1.396263) clamped=false
      PhysicalOffsetFrame joint_Head_parent_offset: socket_parent=/bodyset/Spine translation=(0 0 0.4626109)
      PhysicalOffsetFrame joint_Head_child_offset: socket_parent=/bodyset/Head translation=(0 0 0)
      SpatialTransform: axes_held_at_zero=(translation1 translation2 translation3)
        TransformAxis rotation1: coordinates=NeckInputX axis=(1 0 0) LinearFunction(coefficients=1 0)
        TransformAxis rotation2: coordinates=NeckInputY axis=(0 1 0) LinearFunction(coefficients=1 0)
        TransformAxis rotation3: coordinates=NeckInputZ axis=(0 0 1) LinearFunction(coefficients=1 0)
    CustomJoint joint_femur_r: socket_parent_frame=joint_femur_r_parent_offset
        socket_child_frame=joint_femur_r_child_offset
      Coordinate hip_flexion_r: default_value=0 range=(-0.5235988 2.094395) clamped=false
      Coordinate hip_adduction_r: default_value=0 range=(-0.8726646 0.5235988) clamped=false
      Coordinate hip_rotation_r: default_value=0 range=(-0.6981317 0.6981317) clamped=false
      PhysicalOffsetFrame joint_femur_r_parent_offset: socket_parent=/bodyset/Hip translation=(0 -0.08892 0)
          orientation=(0 0 -1.570796)
      PhysicalOffsetFrame joint_femur_r_child_offset: socket_parent=/bodyset/femur_r translation=(0 0 0)
          orientation=(-1.570796 0 -1.570796)
      SpatialTransform: axes_held_at_zero=(translation1 translation2 translation3)
        TransformAxis rotation1: coordinates=hip_flexion_r axis=(1 0 0) LinearFunction(coefficients=1 0)
        TransformAxis rotation2: coordinates=hip_adduction_r axis=(0 1 0) LinearFunction(coefficients=1 0)
        TransformAxis rotation3: coordinates=hip_rotation_r axis=(0 0 1) LinearFunction(coefficients=1 0)
    CustomJoint joint_tibia_r: socket_parent_frame=joint_tibia_r_parent_offset
        socket_child_frame=joint_tibia_r_child_offset
      Coordinate knee_angle_r: default_value=0 range=(-2.094395 0.1745329) clamped=false
      PhysicalOffsetFrame joint_tibia_r_parent_offset: socket_parent=/bodyset/femur_r
          translation=(-0.00803206 -0.405038 -0.00273031) orientation=(-0.07077003 4.565575e-7 1.695413)
      PhysicalOffsetFrame joint_tibia_r_child_offset: socket_parent=/bodyset/tibia_r
          translation=(-0.00830356 -0.00387542 -0.00152402) orientation=(-0.07077003 4.565575e-7 1.695413)
      SpatialTransform: axes_held_at_zero=(rotation1 rotation2 translation1 translation2 translation3)
        TransformAxis rotation3: coordinates=knee_angle_r axis=(0 0 1) LinearFunction(coefficients=1 0)
    CustomJoint joint_talus_r: socket_parent_frame=joint_talus_r_parent_offset
        socket_child_frame=joint_talus_r_child_offset
      Coordinate ankle_angle_r: default_value=0 range=(-0.6981317 0.5235988) clamped=false
      PhysicalOffsetFrame joint_talus_r_parent_offset: socket_parent=/bodyset/tibia_r
          translation=(-0.0102646 -0.438544 0) orientation=(0.1812328 -0.2768694 0.05080993)
      PhysicalOffsetFrame joint_talus_r_child_offset: socket_parent=/bodyset/talus_r translation=(0 0 0)
          orientation=(0.175895 -0.105208 0.0186622)
      SpatialTransform: axes_held_at_zero=(rotation1 rotation2 translation1 translation2 translation3)
        TransformAxis rotation3: coordinates=ankle_angle_r axis=(0 0 1) LinearFunction(coefficients=1 0)
    CustomJoint joint_calcn_r: socket_parent_frame=joint_calcn_r_parent_offset
        socket_child_frame=joint_calcn_r_child_offset
      Coordinate subtalar_angle_r: default_value=0 range=(-0.3490659 0.3490659) clamped=false
      PhysicalOffsetFrame joint_calcn_r_parent_offset: socket_parent=/bodyset/talus_r
          translation=(-0.0442039 -0.04195 0.00812953) orientation=(-1.76819 0.906223 1.8196)
      PhysicalOffsetFrame joint_calcn_r_child_offset: socket_parent=/bodyset/calcn_r translation=(0 0 0)
          orientation=(-1.76819 0.906223 1.8196)
      SpatialTransform: axes_held_at_zero=(rotation1 rotation2 translation1 translation2 translation3)
        TransformAxis rotation3: coordinates=subtalar_angle_r axis=(0 0 1) LinearFunction(coefficients=1 0)
    CustomJoint joint_toes_r: socket_parent_frame=joint_toes_r_parent_offset
        socket_child_frame=joint_toes_r_child_offset
      Coordinate mtp_angle_r: default_value=0 range=(-0.5235988 0.5235988) clamped=false
      PhysicalOffsetFrame joint_toes_r_parent_offset: socket_parent=/bodyset/calcn_r
          translation=(0.16206 -0.002 0.00110857) orientation=(-3.14159 0.619901 0)
      PhysicalOffsetFrame joint_toes_r_child_offset: socket_parent=/bodyset/toes_r translation=(0 0 0)
          orientation=(-3.14159 0.619901 0)
      SpatialTransform: axes_held_at_zero=(rotation1 rotation2 translation1 translation2 translation3)
        TransformAxis rotation3: coordinates=mtp_angle_r axis=(0 0 1) LinearFunction(coefficients=1 0)
    CustomJoint joint_femur_l: socket_parent_frame=joint_femur_l_parent_offset
        socket_child_frame=joint_femur_l_child_offset
      Coordinate hip_flexion_l: default_value=0 range=(-0.5235988 2.094395) clamped=false
      Coordinate hip_adduction_l: default_value=0 range=(-0.8726646 0.5235988) clamped=false
      Coordinate hip_rotation_l: default_value=0 range=(-0.6981317 0.6981317) clamped=false
      PhysicalOffsetFrame joint_femur_l_parent_offset: socket_parent=/bodyset/Hip translation=(0 0.08892 0)
          orientation=(3.141593 0 1.570796)
      PhysicalOffsetFrame joint_femur_l_child_offset: socket_parent=/bodyset/femur_l translation=(0 0 0)
          orientation=(1.570796 0 1.570796)
      SpatialTransform: axes_held_at_zero=(translation1 translation2 translation3)
        TransformAxis rotation1: coordinates=hip_flexion_l axis=(1 0 0) LinearFunction(coefficients=1 0)
        TransformAxis rotation2: coordinates=hip_adduction_l axis=(0 1 0) LinearFunction(coefficients=1 0)
        TransformAxis rotation3: coordinates=hip_rotation_l axis=(0 0 1) LinearFunction(coefficients=1 0)
    CustomJoint joint_tibia_l: socket_parent_frame=joint_tibia_l_parent_offset
        socket_child_frame=joint_tibia_l_child_offset
      Coordinate knee_angle_l: default_value=0 range=(-2.094395 0.1745329) clamped=false
      PhysicalOffsetFrame joint_tibia_l_parent_offset: socket_parent=/bodyset/femur_l
          translation=(-0.00779732 -0.393201 0.00265051) orientation=(0.07077003 -4.565575e-7 1.695413)
      PhysicalOffsetFrame joint_tibia_l_child_offset: socket_parent=/bodyset/tibia_l
          translation=(-0.00828216 -0.00383839 0.00152009) orientation=(0.07077003 -4.565575e-7 1.695413)
      SpatialTransform: axes_held_at_zero=(rotation1 rotation2 translation1 translation2 translation3)
        TransformAxis rotation3: coordinates=knee_angle_l axis=(0 0 1) LinearFunction(coefficients=1 0)
    CustomJoint joint_talus_l: socket_parent_frame=joint_talus_l_parent_offset
        socket_child_frame=joint_talus_l_child_offset
      Coordinate ankle_angle_l: default_value=0 range=(-0.6981317 0.5235988) clamped=false
      PhysicalOffsetFrame joint_talus_l_parent_offset: socket_parent=/bodyset/tibia_l
          translation=(-0.0102381 -0.434354 0) orientation=(-0.181228 0.2768687 0.05081382)
      PhysicalOffsetFrame joint_talus_l_child_offset: socket_parent=/bodyset/talus_l translation=(0 0 0)
          orientation=(-0.175895 0.105208 0.0186622)
      SpatialTransform: axes_held_at_zero=(rotation1 rotation2 translation1 translation2 translation3)
        TransformAxis rotation3: coordinates=ankle_angle_l axis=(0 0 1) LinearFunction(coefficients=1 0)
    CustomJoint joint_calcn_l: socket_parent_frame=joint_calcn_l_parent_offset
        socket_child_frame=joint_calcn_l_child_offset
      Coordinate subtalar_angle_l: default_value=0 range=(-0.3490659 0.3490659) clamped=false
      PhysicalOffsetFrame joint_calcn_l_parent_offset: socket_parent=/bodyset/talus_l
          translation=(-0.0436964 -0.04195 -0.00810858) orientation=(1.76819 -0.906223 1.8196)
      PhysicalOffsetFrame joint_calcn_l_child_offset: socket_parent=/bodyset/calcn_l translation=(0 0 0)
          orientation=(1.76819 -0.906223 1.8196)
      SpatialTransform: axes_held_at_zero=(rotation1 rotation2 translation1 translation2 translation3)
        TransformAxis rotation3: coordinates=subtalar_angle_l axis=(0 0 1) LinearFunction(coefficients=1 0)
    CustomJoint joint_toes_l: socket_parent_frame=joint_toes_l_parent_offset
        socket_child_frame=joint_toes_l_child_offset
      Coordinate mtp_angle_l: default_value=0 range=(-0.5235988 0.5235988) clamped=false
      PhysicalOffsetFrame joint_toes_l_parent_offset: socket_parent=/bodyset/calcn_l
          translation=(0.160199 -0.002 -0.00110572) orientation=(-3.14159 -0.619901 0)
      PhysicalOffsetFrame joint_toes_l_child_offset: socket_parent=/bodyset/toes_l translation=(0 0 0)
          orientation=(-3.14159 -0.619901 0)
      SpatialTransform: axes_held_at_zero=(rotation1 rotation2 translation1 translation2 translation3)
        TransformAxis rotation3: coordinates=mtp_angle_l axis=(0 0 1) LinearFunction(coefficients=1 0)
  ConstraintSet:
    WeldConstraint two_hand_grip_closure: socket_frame1=closure_frame_a socket_frame2=closure_frame_b
      PhysicalOffsetFrame closure_frame_a: socket_parent=/bodyset/Grip translation=(0 0 -0.0127)
      PhysicalOffsetFrame closure_frame_b: socket_parent=/bodyset/Clubhead translation=(0 -1.0478 0.0635)
          orientation=(-3.141593 -1.396263 -1.570796)
  ForceSet:
    HuntCrossleyForce contact_heel_r: transition_velocity=0.05
      ContactParametersSet contact_parameters:
        ContactParameters: geometry=(ground_plane contact_geom_heel_r) stiffness=50000 dissipation=2
            static_friction=0.9 dynamic_friction=0.8 viscous_friction=0
    HuntCrossleyForce contact_forefoot_r: transition_velocity=0.05
      ContactParametersSet contact_parameters:
        ContactParameters: geometry=(ground_plane contact_geom_forefoot_r) stiffness=50000 dissipation=2
            static_friction=0.9 dynamic_friction=0.8 viscous_friction=0
    HuntCrossleyForce contact_toe_r: transition_velocity=0.05
      ContactParametersSet contact_parameters:
        ContactParameters: geometry=(ground_plane contact_geom_toe_r) stiffness=50000 dissipation=2 static_friction=0.9
            dynamic_friction=0.8 viscous_friction=0
    HuntCrossleyForce contact_heel_l: transition_velocity=0.05
      ContactParametersSet contact_parameters:
        ContactParameters: geometry=(ground_plane contact_geom_heel_l) stiffness=50000 dissipation=2
            static_friction=0.9 dynamic_friction=0.8 viscous_friction=0
    HuntCrossleyForce contact_forefoot_l: transition_velocity=0.05
      ContactParametersSet contact_parameters:
        ContactParameters: geometry=(ground_plane contact_geom_forefoot_l) stiffness=50000 dissipation=2
            static_friction=0.9 dynamic_friction=0.8 viscous_friction=0
    HuntCrossleyForce contact_toe_l: transition_velocity=0.05
      ContactParametersSet contact_parameters:
        ContactParameters: geometry=(ground_plane contact_geom_toe_l) stiffness=50000 dissipation=2 static_friction=0.9
            dynamic_friction=0.8 viscous_friction=0
    CoordinateActuator tau_SpineInputX: coordinate=SpineInputX optimal_force=1
    CoordinateActuator tau_SpineInputY: coordinate=SpineInputY optimal_force=1
    CoordinateActuator tau_TorsoInput: coordinate=TorsoInput optimal_force=1
    CoordinateActuator tau_LEInput: coordinate=LEInput optimal_force=1
    CoordinateActuator tau_LFInput: coordinate=LFInput optimal_force=1
    CoordinateActuator tau_LScapInputX: coordinate=LScapInputX optimal_force=1
    CoordinateActuator tau_LScapInputY: coordinate=LScapInputY optimal_force=1
    CoordinateActuator tau_LSInputX: coordinate=LSInputX optimal_force=1
    CoordinateActuator tau_LSInputY: coordinate=LSInputY optimal_force=1
    CoordinateActuator tau_LSInputZ: coordinate=LSInputZ optimal_force=1
    CoordinateActuator tau_LWInputX: coordinate=LWInputX optimal_force=1
    CoordinateActuator tau_LWInputY: coordinate=LWInputY optimal_force=1
    CoordinateActuator tau_REInput: coordinate=REInput optimal_force=1
    CoordinateActuator tau_RFInput: coordinate=RFInput optimal_force=1
    CoordinateActuator tau_RScapInputX: coordinate=RScapInputX optimal_force=1
    CoordinateActuator tau_RScapInputY: coordinate=RScapInputY optimal_force=1
    CoordinateActuator tau_RSInputX: coordinate=RSInputX optimal_force=1
    CoordinateActuator tau_RSInputY: coordinate=RSInputY optimal_force=1
    CoordinateActuator tau_RSInputZ: coordinate=RSInputZ optimal_force=1
    CoordinateActuator tau_RWInputX: coordinate=RWInputX optimal_force=1
    CoordinateActuator tau_RWInputY: coordinate=RWInputY optimal_force=1
    CoordinateActuator tau_NeckInputX: coordinate=NeckInputX optimal_force=1
    CoordinateActuator tau_NeckInputY: coordinate=NeckInputY optimal_force=1
    CoordinateActuator tau_NeckInputZ: coordinate=NeckInputZ optimal_force=1
    CoordinateActuator tau_hip_flexion_r: coordinate=hip_flexion_r optimal_force=1
    CoordinateActuator tau_hip_adduction_r: coordinate=hip_adduction_r optimal_force=1
    CoordinateActuator tau_hip_rotation_r: coordinate=hip_rotation_r optimal_force=1
    CoordinateActuator tau_knee_angle_r: coordinate=knee_angle_r optimal_force=1
    CoordinateActuator tau_ankle_angle_r: coordinate=ankle_angle_r optimal_force=1
    CoordinateActuator tau_subtalar_angle_r: coordinate=subtalar_angle_r optimal_force=1
    CoordinateActuator tau_mtp_angle_r: coordinate=mtp_angle_r optimal_force=1
    CoordinateActuator tau_hip_flexion_l: coordinate=hip_flexion_l optimal_force=1
    CoordinateActuator tau_hip_adduction_l: coordinate=hip_adduction_l optimal_force=1
    CoordinateActuator tau_hip_rotation_l: coordinate=hip_rotation_l optimal_force=1
    CoordinateActuator tau_knee_angle_l: coordinate=knee_angle_l optimal_force=1
    CoordinateActuator tau_ankle_angle_l: coordinate=ankle_angle_l optimal_force=1
    CoordinateActuator tau_subtalar_angle_l: coordinate=subtalar_angle_l optimal_force=1
    CoordinateActuator tau_mtp_angle_l: coordinate=mtp_angle_l optimal_force=1
  MarkerSet:
    Marker BackLeft: Spine (-0.11 0.09 0.2958277)
    Marker BackRight: Spine (-0.11 -0.09 0.2958277)
    Marker BackTop: Spine (-0.1 0 0.4426109)
    Marker HeadFront: Head (0.1 0 0.16)
    Marker HeadSide: Head (0 0.08 0.16)
    Marker HeadTop: Head (0 0 0.24)
    Marker LAnkleOut: tibia_l (0 0 0)
    Marker LElbowOut: LS (0 0.04 -0.3043525)
    Marker LKneeOut: femur_l (0 0 0)
    Marker LShoulderBack: LScap (-0.06 0.18494 0.02)
    Marker LShoulderTop: LScap (0 0.19494 0.05)
    Marker LToeIn: calcn_l (0 0 0)
    Marker LToeOut: calcn_l (0 0 0)
    Marker LUArmHigh: LS (0.01 0.04 -0.1065234)
    Marker LWristTop: LF (0.03 0 -0.1352616)
    Marker Marker_2:2:1: Clubhead (0.001423626 -0.07311493 -0.008604687)
    Marker Marker_2:2:2: Clubhead (0.04934389 -0.01026846 -0.05649533)
    Marker Marker_2:2:3: Clubhead (0.06228662 0.0008239108 -0.007326245)
    Marker Marker_3:3:1: Clubhead (-0.683609 -0.07775938 -0.005741693)
    Marker Marker_3:3:2: Clubhead (-0.754133 -0.05061053 0.02168481)
    Marker Marker_3:3:3: Clubhead (-0.8044805 -0.07052191 -0.001570405)
    Marker RAnkleOut: tibia_r (0 0 0)
    Marker RElbowOut: RS (0 -0.04 -0.3043525)
    Marker RKneeOut: femur_r (0 0 0)
    Marker RShoulderBack: RScap (-0.06 -0.18494 0.02)
    Marker RShoulderTop: RScap (0 -0.19494 0.05)
    Marker RToeIn: calcn_r (0 0 0)
    Marker RToeOut: calcn_r (0 0 0)
    Marker RUArmHigh: RS (0.01 -0.04 -0.1065234)
    Marker RWristTop: RF (0.03 0 -0.1352616)
    Marker WaistLBack: Hip (-0.1 0.07 0.1)
    Marker WaistLeft: Hip (0.02 0.15 0.08)
    Marker WaistRBack: Hip (-0.1 -0.07 0.1)
    Marker WaistRight: Hip (0.02 -0.15 0.08)
  ContactGeometrySet:
    ContactHalfSpace ground_plane: socket_frame=/ground location=(0 0 0) orientation=(0 0 -1.570796)
    ContactSphere contact_geom_heel_r: socket_frame=/bodyset/calcn_r location=(0.01 -0.005 0) radius=0.035
    ContactSphere contact_geom_forefoot_r: socket_frame=/bodyset/calcn_r location=(0.16 -0.005 0) radius=0.03
    ContactSphere contact_geom_toe_r: socket_frame=/bodyset/calcn_r location=(0.23 -0.01 0) radius=0.025
    ContactSphere contact_geom_heel_l: socket_frame=/bodyset/calcn_l location=(0.01 -0.005 0) radius=0.035
    ContactSphere contact_geom_forefoot_l: socket_frame=/bodyset/calcn_l location=(0.16 -0.005 0) radius=0.03
    ContactSphere contact_geom_toe_l: socket_frame=/bodyset/calcn_l location=(0.23 -0.01 0) radius=0.025
