# OpenSim document version 40500
Model pendulum_1dof:
  credits: Golf Modeling Suite - Cross-Engine Validation Model
  gravity: 0 -9.80665 0
  # Simple 1-DOF Pendulum Model for Cross-Engine Validation
  # Use case: Ground truth comparison between OpenSim, MuJoCo, Drake, Pinocchio
  # Properties:
  # - Single revolute joint (pin)
  # - Point mass at end of massless rod
  # - Gravity: -9.80665 m/s² (NIST standard)
  # - No damping or friction
  # Expected small-angle period: T = 2π√(L/g) ≈ 2.006s for L=1m
  # Note: Uses small-angle approximation (θ << 1); actual period varies with amplitude.
  # Ground
  Ground
  BodySet:
    Body pendulum_link: mass=1 mass_center=(0 -0.5 0) inertia=(0.0833333 0 0 0 0.0833333 0) meshes=pendulum_link.vtp
  JointSet:
    PinJoint pin_joint: parent_body=ground location_in_parent=(0 0 0) location=(0 0 0) body=pendulum_link
      Coordinate angle: motion_type=rotational default_value=0.1 range=(-3.14159 3.14159) clamped=false
  MarkerSet:
    Marker end_effector: pendulum_link (0 -1 0) fixed=true
